<Lems>

    <!--

        This LEMS file has been automatically generated using PyNeuroML v0.5.1 (libNeuroML v0.2.50)

     -->

    <!-- Specify which component to run -->
    <Target component="Sim_PINGNet"/>

    <!-- Include core NeuroML2 ComponentType definitions -->
    <Include file="Cells.xml"/>
    <Include file="Networks.xml"/>
    <Include file="Simulation.xml"/>

    <Include file="PyNN.xml"/>
    <Include file="PINGNet.net.nml"/>
    <Include file="../cells/poolosyn.cell.nml"/>
    <Include file="../cells/pvbasket.cell.nml"/>
    <Include file="../synapses/exp2Synapses.synapse.nml"/>

    <Simulation id="Sim_PINGNet" length="100ms" step="0.01ms" target="PINGNet" seed="12345">  <!-- Note seed: ensures same random numbers used every run -->

        <Display id="Display_pop_poolosyn_v" title="Plots of Display_pop_poolosyn_v" timeScale="1ms" xmin="-10.0" xmax="110.0" ymin="-80" ymax="40">
            <Line id="pop_poolosyn_0_poolosyncell_v" quantity="pop_poolosyn/0/poolosyncell/v" scale="1mV" color="#6aa799" timeScale="1ms"/>
            <Line id="pop_poolosyn_1_poolosyncell_v" quantity="pop_poolosyn/1/poolosyncell/v" scale="1mV" color="#029a72" timeScale="1ms"/>
            <Line id="pop_poolosyn_2_poolosyncell_v" quantity="pop_poolosyn/2/poolosyncell/v" scale="1mV" color="#d340bb" timeScale="1ms"/>
            <Line id="pop_poolosyn_3_poolosyncell_v" quantity="pop_poolosyn/3/poolosyncell/v" scale="1mV" color="#4c73a9" timeScale="1ms"/>
            <Line id="pop_poolosyn_4_poolosyncell_v" quantity="pop_poolosyn/4/poolosyncell/v" scale="1mV" color="#5e503a" timeScale="1ms"/>
        </Display>

        <Display id="Display_pop_pvbasket_v" title="Plots of Display_pop_pvbasket_v" timeScale="1ms" xmin="-10.0" xmax="110.0" ymin="-80" ymax="40">
            <Line id="pop_pvbasket_0_pvbasketcell_v" quantity="pop_pvbasket/0/pvbasketcell/v" scale="1mV" color="#3193ca" timeScale="1ms"/>
            <Line id="pop_pvbasket_1_pvbasketcell_v" quantity="pop_pvbasket/1/pvbasketcell/v" scale="1mV" color="#90e5e9" timeScale="1ms"/>
            <Line id="pop_pvbasket_2_pvbasketcell_v" quantity="pop_pvbasket/2/pvbasketcell/v" scale="1mV" color="#29645f" timeScale="1ms"/>
            <Line id="pop_pvbasket_3_pvbasketcell_v" quantity="pop_pvbasket/3/pvbasketcell/v" scale="1mV" color="#1fcff4" timeScale="1ms"/>
            <Line id="pop_pvbasket_4_pvbasketcell_v" quantity="pop_pvbasket/4/pvbasketcell/v" scale="1mV" color="#6ed4e9" timeScale="1ms"/>
        </Display>

        <OutputFile id="Sim_PINGNet_pop_poolosyn_v_dat" fileName="Sim_PINGNet.pop_poolosyn.v.dat">
            <OutputColumn id="pop_poolosyn_0_poolosyncell_v" quantity="pop_poolosyn/0/poolosyncell/v"/>
            <OutputColumn id="pop_poolosyn_1_poolosyncell_v" quantity="pop_poolosyn/1/poolosyncell/v"/>
            <OutputColumn id="pop_poolosyn_2_poolosyncell_v" quantity="pop_poolosyn/2/poolosyncell/v"/>
            <OutputColumn id="pop_poolosyn_3_poolosyncell_v" quantity="pop_poolosyn/3/poolosyncell/v"/>
            <OutputColumn id="pop_poolosyn_4_poolosyncell_v" quantity="pop_poolosyn/4/poolosyncell/v"/>
        </OutputFile>

        <OutputFile id="Sim_PINGNet_pop_pvbasket_v_dat" fileName="Sim_PINGNet.pop_pvbasket.v.dat">
            <OutputColumn id="pop_pvbasket_0_pvbasketcell_v" quantity="pop_pvbasket/0/pvbasketcell/v"/>
            <OutputColumn id="pop_pvbasket_1_pvbasketcell_v" quantity="pop_pvbasket/1/pvbasketcell/v"/>
            <OutputColumn id="pop_pvbasket_2_pvbasketcell_v" quantity="pop_pvbasket/2/pvbasketcell/v"/>
            <OutputColumn id="pop_pvbasket_3_pvbasketcell_v" quantity="pop_pvbasket/3/pvbasketcell/v"/>
            <OutputColumn id="pop_pvbasket_4_pvbasketcell_v" quantity="pop_pvbasket/4/pvbasketcell/v"/>
        </OutputFile>

        <EventOutputFile id="Spikes_file__pop_poolosyn" fileName="Sim_PINGNet.pop_poolosyn.spikes" format="ID_TIME">
            <EventSelection id="0" select="pop_poolosyn/0/poolosyncell" eventPort="spike"/>
            <EventSelection id="1" select="pop_poolosyn/1/poolosyncell" eventPort="spike"/>
            <EventSelection id="2" select="pop_poolosyn/2/poolosyncell" eventPort="spike"/>
            <EventSelection id="3" select="pop_poolosyn/3/poolosyncell" eventPort="spike"/>
            <EventSelection id="4" select="pop_poolosyn/4/poolosyncell" eventPort="spike"/>
            <EventSelection id="5" select="pop_poolosyn/5/poolosyncell" eventPort="spike"/>
            <EventSelection id="6" select="pop_poolosyn/6/poolosyncell" eventPort="spike"/>
            <EventSelection id="7" select="pop_poolosyn/7/poolosyncell" eventPort="spike"/>
            <EventSelection id="8" select="pop_poolosyn/8/poolosyncell" eventPort="spike"/>
            <EventSelection id="9" select="pop_poolosyn/9/poolosyncell" eventPort="spike"/>
            <EventSelection id="10" select="pop_poolosyn/10/poolosyncell" eventPort="spike"/>
            <EventSelection id="11" select="pop_poolosyn/11/poolosyncell" eventPort="spike"/>
            <EventSelection id="12" select="pop_poolosyn/12/poolosyncell" eventPort="spike"/>
            <EventSelection id="13" select="pop_poolosyn/13/poolosyncell" eventPort="spike"/>
            <EventSelection id="14" select="pop_poolosyn/14/poolosyncell" eventPort="spike"/>
            <EventSelection id="15" select="pop_poolosyn/15/poolosyncell" eventPort="spike"/>
            <EventSelection id="16" select="pop_poolosyn/16/poolosyncell" eventPort="spike"/>
            <EventSelection id="17" select="pop_poolosyn/17/poolosyncell" eventPort="spike"/>
            <EventSelection id="18" select="pop_poolosyn/18/poolosyncell" eventPort="spike"/>
            <EventSelection id="19" select="pop_poolosyn/19/poolosyncell" eventPort="spike"/>
            <EventSelection id="20" select="pop_poolosyn/20/poolosyncell" eventPort="spike"/>
            <EventSelection id="21" select="pop_poolosyn/21/poolosyncell" eventPort="spike"/>
            <EventSelection id="22" select="pop_poolosyn/22/poolosyncell" eventPort="spike"/>
            <EventSelection id="23" select="pop_poolosyn/23/poolosyncell" eventPort="spike"/>
            <EventSelection id="24" select="pop_poolosyn/24/poolosyncell" eventPort="spike"/>
            <EventSelection id="25" select="pop_poolosyn/25/poolosyncell" eventPort="spike"/>
            <EventSelection id="26" select="pop_poolosyn/26/poolosyncell" eventPort="spike"/>
            <EventSelection id="27" select="pop_poolosyn/27/poolosyncell" eventPort="spike"/>
            <EventSelection id="28" select="pop_poolosyn/28/poolosyncell" eventPort="spike"/>
            <EventSelection id="29" select="pop_poolosyn/29/poolosyncell" eventPort="spike"/>
            <EventSelection id="30" select="pop_poolosyn/30/poolosyncell" eventPort="spike"/>
            <EventSelection id="31" select="pop_poolosyn/31/poolosyncell" eventPort="spike"/>
            <EventSelection id="32" select="pop_poolosyn/32/poolosyncell" eventPort="spike"/>
            <EventSelection id="33" select="pop_poolosyn/33/poolosyncell" eventPort="spike"/>
            <EventSelection id="34" select="pop_poolosyn/34/poolosyncell" eventPort="spike"/>
            <EventSelection id="35" select="pop_poolosyn/35/poolosyncell" eventPort="spike"/>
            <EventSelection id="36" select="pop_poolosyn/36/poolosyncell" eventPort="spike"/>
            <EventSelection id="37" select="pop_poolosyn/37/poolosyncell" eventPort="spike"/>
            <EventSelection id="38" select="pop_poolosyn/38/poolosyncell" eventPort="spike"/>
            <EventSelection id="39" select="pop_poolosyn/39/poolosyncell" eventPort="spike"/>
            <EventSelection id="40" select="pop_poolosyn/40/poolosyncell" eventPort="spike"/>
            <EventSelection id="41" select="pop_poolosyn/41/poolosyncell" eventPort="spike"/>
            <EventSelection id="42" select="pop_poolosyn/42/poolosyncell" eventPort="spike"/>
            <EventSelection id="43" select="pop_poolosyn/43/poolosyncell" eventPort="spike"/>
            <EventSelection id="44" select="pop_poolosyn/44/poolosyncell" eventPort="spike"/>
            <EventSelection id="45" select="pop_poolosyn/45/poolosyncell" eventPort="spike"/>
            <EventSelection id="46" select="pop_poolosyn/46/poolosyncell" eventPort="spike"/>
            <EventSelection id="47" select="pop_poolosyn/47/poolosyncell" eventPort="spike"/>
            <EventSelection id="48" select="pop_poolosyn/48/poolosyncell" eventPort="spike"/>
            <EventSelection id="49" select="pop_poolosyn/49/poolosyncell" eventPort="spike"/>
        </EventOutputFile>

        <EventOutputFile id="Spikes_file__pop_pvbasket" fileName="Sim_PINGNet.pop_pvbasket.spikes" format="ID_TIME">
            <EventSelection id="0" select="pop_pvbasket/0/pvbasketcell" eventPort="spike"/>
            <EventSelection id="1" select="pop_pvbasket/1/pvbasketcell" eventPort="spike"/>
            <EventSelection id="2" select="pop_pvbasket/2/pvbasketcell" eventPort="spike"/>
            <EventSelection id="3" select="pop_pvbasket/3/pvbasketcell" eventPort="spike"/>
            <EventSelection id="4" select="pop_pvbasket/4/pvbasketcell" eventPort="spike"/>
            <EventSelection id="5" select="pop_pvbasket/5/pvbasketcell" eventPort="spike"/>
            <EventSelection id="6" select="pop_pvbasket/6/pvbasketcell" eventPort="spike"/>
            <EventSelection id="7" select="pop_pvbasket/7/pvbasketcell" eventPort="spike"/>
            <EventSelection id="8" select="pop_pvbasket/8/pvbasketcell" eventPort="spike"/>
            <EventSelection id="9" select="pop_pvbasket/9/pvbasketcell" eventPort="spike"/>
            <EventSelection id="10" select="pop_pvbasket/10/pvbasketcell" eventPort="spike"/>
            <EventSelection id="11" select="pop_pvbasket/11/pvbasketcell" eventPort="spike"/>
            <EventSelection id="12" select="pop_pvbasket/12/pvbasketcell" eventPort="spike"/>
            <EventSelection id="13" select="pop_pvbasket/13/pvbasketcell" eventPort="spike"/>
            <EventSelection id="14" select="pop_pvbasket/14/pvbasketcell" eventPort="spike"/>
            <EventSelection id="15" select="pop_pvbasket/15/pvbasketcell" eventPort="spike"/>
            <EventSelection id="16" select="pop_pvbasket/16/pvbasketcell" eventPort="spike"/>
            <EventSelection id="17" select="pop_pvbasket/17/pvbasketcell" eventPort="spike"/>
            <EventSelection id="18" select="pop_pvbasket/18/pvbasketcell" eventPort="spike"/>
            <EventSelection id="19" select="pop_pvbasket/19/pvbasketcell" eventPort="spike"/>
        </EventOutputFile>

    </Simulation>

</Lems>
